*HEADING
ABAQUS input deck
**         Nodes
*NODE, NSET=NALL
1,-2.000000029E-01, 1.212498173E-01, 2.657158076E-01
2,-2.000000029E-01, 9.395208954E-02, 3.363113999E-01
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**         Elements
*ELEMENT, TYPE=C3D4, ELSET=PID3
1, 37, 6, 29, 52
2, 37, 52, 38, 6
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**         All elements set
*ELSET, GENERATE, ELSET=EALL
1, 1942
**         Node sets
*NSET, NSET=wall-solid
1,2,3,4,5,6
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**         Element sets
**         Element properties
*SOLID SECTION, ELSET=PID3, MATERIAL=MID3
**         Material properties
*MATERIAL, NAME=MID3
*ELASTIC, TYPE=ISOTROPIC
1., 0.,
**         Contact pairs and Co-simulation
**         Steps
*STEP
*STATIC
*BOUNDARY, OP=NEW
*END STEP
